*Heading
** Job name: panel Model name: panel
** Generated by: Abaqus/CAE 2020
*Preprint, echo=NO, model=NO, history=NO, contact=NO
**
** PARTS
**
*Part, name=plate
*Node
      1,        -125.,           0.,         600.
      2,        -125.,           0.,         590.
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*Element, type=S4R
   1,    1,    2,   63,   62
   2,    2,    3,   64,   63
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** Region: (PlateLayup-1: Generated From Layup)
*Elset, elset=PlateLayup-1, generate
    1,  1560,     1
** Section: PlateLayup-1
*Shell Section, elset=PlateLayup-1, composite, section integration=GAUSS, layup=PlateLayup
0.184, 3, T800M21GPa, 45., Ply-1
0.184, 3, T800M21GPa, -45., Ply-2
0.184, 3, T800M21GPa, 0., Ply-3
0.184, 3, T800M21GPa, 0., Ply-4
0.184, 3, T800M21GPa, 90., Ply-5
0.184, 3, T800M21GPa, 0., Ply-6
0.184, 3, T800M21GPa, 0., Ply-7
0.184, 3, T800M21GPa, 90., Ply-8
0.184, 3, T800M21GPa, 0., Ply-9
0.184, 3, T800M21GPa, 0., Ply-10
0.184, 3, T800M21GPa, -45., Ply-11
0.184, 3, T800M21GPa, 45., Ply-12
*End Part
**
*Part, name=stiffener
*Node
      1,          63.,   2.20799994,         600.
      2,          27.,   2.20799994,         600.
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*Element, type=S4R
   1,    1,   15,  981,  328
   2,   15,   16,  982,  981
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** Region: (StiffenerLayup-1: Generated From Layup)
*Elset, elset=StiffenerLayup-1, generate
    1,  6300,     1
** Section: StiffenerLayup-1
*Shell Section, elset=StiffenerLayup-1, composite, section integration=GAUSS, layup=StiffenerLayup
0.184, 3, T800M21GPa, 45., Ply-1
0.184, 3, T800M21GPa, -45., Ply-2
0.184, 3, T800M21GPa, 0., Ply-3
0.184, 3, T800M21GPa, 0., Ply-4
0.184, 3, T800M21GPa, 90., Ply-5
0.184, 3, T800M21GPa, 0., Ply-6
0.184, 3, T800M21GPa, 0., Ply-7
0.184, 3, T800M21GPa, 90., Ply-8
0.184, 3, T800M21GPa, 0., Ply-9
0.184, 3, T800M21GPa, 0., Ply-10
0.184, 3, T800M21GPa, -45., Ply-11
0.184, 3, T800M21GPa, 45., Ply-12
*End Part
**
**
** ASSEMBLY
**
*Assembly, name=Assembly
**
*Instance, name=plate-1, part=plate
*End Instance
**
*Instance, name=stiffener-1, part=stiffener
*End Instance
**
*Node
      1,           0.,   32.2080002,         600.
*Nset, nset=bottom_set, instance=plate-1, generate
    1,  1587,    61
*Nset, nset=bottom_set, instance=stiffener-1
   1,   2,   5,   7,  10,  11
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*Elset, elset=bottom_set, instance=plate-1, generate
    1,  1501,    60
*Elset, elset=bottom_set, instance=stiffener-1
    1,    2,    3,    4,    5,    6
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*Nset, nset=side_set, instance=plate-1
    1,    2,    3,    4,    5,    6
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*Elset, elset=side_set, instance=plate-1
    1,    2,    3,    4,    5,    6
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*Nset, nset=top_set, instance=plate-1, generate
   61,  1647,    61
*Nset, nset=top_set, instance=stiffener-1
   3,   4,   6,   8,   9,  12
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*Elset, elset=top_set, instance=plate-1, generate
   60,  1560,    60
*Elset, elset=top_set, instance=stiffener-1
 1342, 1343, 1344, 1345, 1346, 1347
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*Nset, nset=_PickedSet15, internal
 1,
*Nset, nset=_PickedSet16, internal
 1,
*Nset, nset=_PickedSet17, internal
 1,
*Elset, elset=_plate_top_surf_SNEG, internal, instance=plate-1, generate
    1,  1560,     1
*Surface, type=ELEMENT, name=plate_top_surf
_plate_top_surf_SNEG, SNEG
*Elset, elset=_stiffener_bottom_surf_SPOS, internal, instance=stiffener-1
    1,    2,    3,    4,    5,    6
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*Surface, type=ELEMENT, name=stiffener_bottom_surf
_stiffener_bottom_surf_SPOS, SPOS
** Constraint: Weld
*Tie, name=Weld, adjust=yes
stiffener_bottom_surf, plate_top_surf
** Constraint: loadpoint
*Rigid Body, ref node=_PickedSet15, tie nset=bottom_set
*End Assembly
**
** MATERIALS
**
*Material, name=T800M21GPa
*Density
 1.6e-06,
*Elastic, type=LAMINA
139.,  8.1, 0.33,  4.8,  4.8,  3.1
** ----------------------------------------------------------------
**
** STEP: buckle
**
*Step, name=buckle, nlgeom=NO, perturbation
*Buckle
1, , 2, 10000
**
** BOUNDARY CONDITIONS
**
** Name: clamped Type: Symmetry/Antisymmetry/Encastre
*Boundary, op=NEW, load case=1
top_set, ENCASTRE
*Boundary, op=NEW, load case=2
top_set, ENCASTRE
** Name: slider Type: Displacement/Rotation
*Boundary, op=NEW, load case=1
_PickedSet17, 1, 1
_PickedSet17, 2, 2
_PickedSet17, 4, 4
_PickedSet17, 5, 5
_PickedSet17, 6, 6
*Boundary, op=NEW, load case=2
_PickedSet17, 1, 1
_PickedSet17, 2, 2
_PickedSet17, 4, 4
_PickedSet17, 5, 5
_PickedSet17, 6, 6
**
** LOADS
**
** Name: compression   Type: Concentrated force
*Cload
_PickedSet16, 3, -1.
**
** OUTPUT REQUESTS
**
*Restart, write, frequency=0
**
** FIELD OUTPUT: F-Output-1
**
*Output, field, variable=PRESELECT
*End Step
